// COMSOL Multiphysics 5.5.0.359 model "Ellipse_RZ_Gravity.mph"
// Outline of the model tree

Parameters
  zc = -3e3[m]
  r1 = 0.5e3[m]
  r2 = 1e3[m]
  E = 30e9[Pa]
  nu = 0.25
  rhor = 2600[kg/m^3]
  OP = 10e6[Pa]
  g = g_const

Geometry
  geom1 "Geometry 1" (2D axisymmetric, length unit m)
    r1: Rectangle | pos = {0, -10e3}; size = {10e3, 10e3}
    e1: Ellipse | pos = {0, zc}; semiaxes = {r2, r1}
    dif1: Difference | input = r1; input2 = e1
    fin: Finalize "Form Union"

Physics
  solid: SolidMechanics on all domains
    dependent variable u = {u, v, w}
    lemm1: LinearElasticModel "Linear Elastic Material 1" (default)
      E_mat = userdef
      E = E
      nu_mat = userdef
      nu = nu
      rho_mat = userdef
      rho = rhor
      iss1: InitialStressandStrain on all domains | Sil = rhor*g_const*z
    axi1: AxialSymmetrySolid "Axial Symmetry 1" (default)
    free1: Free (default)
    init1: init "Initial Values 1" (default)
    roll1: Roller on boundaries 2, 5
    bndl1: BoundaryLoad on boundaries 6, 7 | LoadType = FollowerPressure; FollowerPressure = OP-rhor*g_const*z
    gr1: Gravity on domains 1

Mesh
  mesh1 "Mesh 1"
    size: MeshSizeDefault | hmax = 670; hmin = 3; hcurve = 0.3; hgrad = 1.3
    ftri1: FreeTri "Free Triangular 1" on remaining entities
      dis1: Distribution on boundaries 4 | type = predefined; elemcount = 25; elemratio = 10

Studies
  std1 "Study 1"
    stat: Stationary

Solver configurations
  sol1 "Solution 1" (study std1)
    v1: Variables "Dependent Variables 1"
    s1: Stationary "Stationary Solver 1"
      dDef: Direct
      fc1: FullyCoupled | linsolver = dDef

Datasets
  dset1: Solution | solution = sol1
  rev1: Revolve2D "Revolution 2D 1" | data = dset1; startangle = -90; revangle = 225
  edg1: Edge2D on boundaries 4 | data = dset1
  cln1: CutLine2D | data = dset1; genpoints = {{1e3, 0}, {1e3, -10e3}}

Plots
  pg1: PlotGroup2D "Stress (solid)" | data = dset1
    surf1: Surface | expr = w
  pg4: PlotGroup2D "Stress (solid) 1" | data = dset1
    surf1: Surface | expr = solid.sr-rhor*g_const*z
  pg2: PlotGroup3D "Stress, 3D (solid)" | data = rev1
    surf1: Surface | expr = solid.mises
      def: Deform "Deformation" | revcoordsys = cylindrical; expr = {u, 0, w}; descr = Displacement field
  pg3: PlotGroup2D "Boundary Loads (solid)" | data = dset1; typeintitle = off; descriptionintitle = off; unitintitle = off
    arwl1: ArrowLine "Boundary Load 1" | expr = {solid.bndl1.F_Ar, solid.bndl1.F_Az}
      col: Color "Color Expression" | expr = comp1.solid.bndl1.F_A_Mag
      def: Deform "Deformation" | expr = {u, w}; descr = Displacement field
    surf1: Surface "Gray Surfaces" (disabled) | expr = 1
      def: Deform "Deformation" | expr = {u, w}; descr = Displacement field
  pg5: PlotGroup1D "1D Plot Group 5" | data = dset1
    lngr1: LineGraph on boundaries 4 | expr = w

Exports
  data1: Data
    data = edg1
    expr = {u, w}
    filename = /Users/yanzhan/Documents/Project/project_moose/elastic2d/gold/disp.txt
    location = regulargrid
    regulargridx1 = 101
  data2: Data
    data = cln1
    expr = {solid.sr, solid.sz, solid.srz}
    filename = /Users/yanzhan/Documents/Project/project_moose/elastic2d/gold/sigma.txt
    location = regulargrid
    regulargridx1 = 101